n := 5
x := 1
y := 0
z := 5
solve block
    # constraints
    n*x + (n + 1)*y + (n + 2)*z == 6*n + 8
    (n - 3)*x + (n - 2)*y + n*z == 6*n - 7
    (n - 1)*x + n*y + (n + 1)*z == 6*n + 2
    # solver
    R := Find(x, y, z) = [1; 2; 3]
end solve block
A := [n, n + 1, n + 2; n - 3, n - 2, n; n - 1, n, n + 1] = [5, 6, 7; 2, 3, 5; 4, 5, 6]
B := [6*n + 8; 6*n - 7; 6*n + 2] = [38; 23; 32]
X := A^-1*B = [1; 2; 3]
A*X = [38; 23; 32]
x := X[0] = 1
y := X[1] = 2
z := X[2] = 3
