f(x) := x*sin(x)
x := 0, 0.01 .. 10
# [plot: f(x) vs x]
x1 := 2
x1 := maximize(f, x1) = 2.02876
x2 := 8
x2 := maximize(f, x2) = 7.97867
x3 := 5
x3 := minimize(f, x3) = 4.91318
x4 := 10
x4 := minimize(f, x4) = 11.0855
