V := runif(5, -5, 5) = [-3.25871; 2.10495; -1.96014; -4.08589; -3.52687]
x := -5, -4.5 .. 5 = [-5; -4.5; -4; -3.5; -3; -2.5; -2; -1.5; -1; -0.5; 0; 0.5; 1; 1.5; 2; 2.5; 3; 3.5; 4; 4.5; 5]
S := V[0]*V[4] = 11.493
x := 0
y := 1
solve block
    # constraints
    x + y == 1
    x - y == 0
    # solver
    res := find(x, y) = [0.5; 0.5]
end solve block
f(x) := sin(x)
g(x) := cos(x)
# [plot: f(x), g(x) vs x]
A := [1, 1; 1, -1]
B := [1; 0]
K := A^-1*B = [0.5; 0.5]
R := root(f(x), x, -1, 1) = 0
