n := 5
f(x) := trunc(x^2 - n*x + sin(x))*sqrt(x - cos(n*x))
x := -2, -1.6 .. 2
x = [-2; -1.6; -1.2; -0.8; -0.4; 0; 0.4; 0.8; 1.2; 1.6; 2]
f(x) = [14.007i; 10.8542i; 8.81851i; 1.1477i; 0.12707; 0; -0.903408; -2.41134; -1.46917; -5.28469; -8.42477]
