n := 4
A := runif(3, -3*n, 3*n)
A = [-10.4118; 1.76023; 1.153]
B := runif(3, -3*n, 3*n)
B = [-4.52775; 7.39243; -5.17765]
C := runif(3, -3*n, 3*n)
C = [9.48544; 5.85104; -3.33262]
s := A*B
s = 54.1846
V := B×C
V = [5.65839; -64.2015; -96.6125]
w := (A×B)*C
w = -283.318
m := max(A, B, C)
ans := if(length(A) == m, "A", if(length(B) == m, "B", "C"))
ans = "C"
rd(a, b) := if(rnd(1) > 0.5, rnd(10), -rnd(10))
M := matrix(n, n, rd)
M = [
    3.75857, 4.57976, 7.51536, -9.66604;
    0.088171, 5.99041, -4.91884, -8.21673;
    -5.87912, 5.72399, 1.4752, -8.17184;
    4.84931, -4.25165, -6.9288, -7.32007
]
sum := sum(sum(M[i, j], j = 0 .. n - 1), i = 0 .. n - 1)
sum = -21.3723
sumP := sum(sum(if(M[i, j] > 0, M[i, j], 0), j = 0 .. n - 1), i = 0 .. n - 1)
sumP = 33.9808
sumM := sum(sum(if(M[i, j] < 0, M[i, j], 0), j = 0 .. n - 1), i = 0 .. n - 1)
sumM = -55.3531
X := M[:, 1]*M[1, :]
X = [
    0.403802, 27.4346, -22.5271, -37.6306;
    0.528181, 35.885, -29.4659, -49.2216;
    0.50469, 34.289, -28.1554, -47.0325;
    -0.374872, -25.4691, 20.9132, 34.9347
]
