Δx := π/4
x := -2*π, -2*π + Δx .. 2*π
g(x) := sqrt(x)*sin(x)
X := x
WRITEFILE("XX.dat", X)
WRITEFILE("YY.dat", g(x))
XX := READFILE("XX.dat", "delimited")
YY := READFILE("YY.dat", "delimited")
# [plot: g(x) vs x]
