XA := -2
XB := -3
XC := 0
XD := 3
XE := 2
XF := -2
XH := 2
YA := -4
YB := 0
YC := 4
YD := 0
YE := -4
YF := 0
YH := 0
Xlw := 100
Ylw := 200
Xhw := 400
Yhw := 500
Zx := transpose([XA, XB, XC, XD, XE, XF, XH])
Zy := transpose([YA, YB, YC, YD, YE, YF, YH])
Xl := min(Zx) = -3
Yh := max(Zy) = 4
ΔXw := Xhw - Xlw = 300
ΔYw := Yhw - Ylw = 300
Xh := max(Zx) = 3
Yl := min(Zy) = -4
ΔX := Xh - Xl = 6
ΔY := Yh - Yl = 8
Kx := ΔXw/ΔX = 50
Ky := ΔYw/ΔY = 37.5
Tsw := [Kx, 0, Xlw - Kx*Xl; 0, -Ky, Yhw + Ky*Yl; 0, 0, 1] = [50, 0, 250; 0, -37.5, 350; 0, 0, 1]
[XAw; YAw; q] := Tsw*[XA; YA; 1] = [150; 500; 1]  # - А
[XBw; YBw; q] := Tsw*[XB; YB; 1] = [100; 350; 1]  # - В
[XCw; YCw; q] := Tsw*[XC; YC; 1] = [250; 200; 1]  # - C
# - F
[XDw; YDw; q] := Tsw*[XD; YD; 1] = [400; 350; 1]  # - D
[XEw; YEw; q] := Tsw*[XE; YE; 1] = [350; 500; 1]  # - E
[XFw; YFw; q] := Tsw*[XF; YF; 1] = [150; 350; 1]
[XHw; YHw; q] := Tsw*[XH; YH; 1] = [350; 350; 1]  # - H
X := transpose([XB, XC, XD, XB, XF, XA, XE, XH, XD])
Y := transpose([YB, YC, YD, YB, YF, YA, YE, YH, YD])
Xw := transpose([XBw, XCw, XDw, XBw, XFw, XAw, XEw, XHw, XDw])
Yw := transpose([YBw, YCw, YDw, YBw, YFw, YAw, YEw, YHw, YDw])
# ОКОННАЯ СК
# МИРОВАЯ СК
# [plot: Y vs X]
# [plot: Yw vs Xw]
