# Построить график функции f(x) с шагом dX для промежутка от x1 до x2
f(x) := sin(π*x)*sqrt(|x|)
x1 := -6
x2 := 6
ΔX := 0.01
xx := 0 .. 10
Xlw := 100
Ylw := 200  # - левый верхний угл
Xhw := 800
Yhw := 900  # - правый нижний угл
# Вычисляем число точек графика
N := round((x2 - x1)/ΔX) = 1200
i := 0 .. N
X[i] := x1 + i*ΔX
Y[i] := f(X[i])
Z[i] := 1  # - x, y - координаты в МСК
Xl := min(X) = -6
Yh := max(Y) = 2.34618  # - левый верхний угол в МСК
Xh := max(X) = 6
Yl := min(Y) = -2.34618  # - правый нижний угол в МСК
M := stack(transpose(X), transpose(Y), transpose(Z))
# Вычисляем параметры, необходимые для формирования матрицы пересчета координат из МСК в ОСК
dXw := Xhw - Xlw = 700
dx := Xh - Xl = 12
dYw := Yhw - Ylw = 700
dy := Yh - Yl = 4.69236
kx := dXw/dx = 58.3333
ky := dYw/dy = 149.179
# Формируем матрица пересчетов из МСК в ОСК
Tsw := [kx, 0, Xlw - kx*Xl; 0, -ky, Yhw + ky*Yl; 0, 0, 1] = [58.3333, 0, 450; 0, -149.179, 550; 0, 0, 1]
# Вычисляем матрицу координат точек графика в ОСК
Mw := Tsw*M
# Из матрицы М выбираем (х,у) - координаты точек графика для отображения
Xw := transpose(Mw)[:, 0]
Yw := transpose(Mw)[:, 1]
# В мировой СК | В оконной СК
# [plot: Y vs X]
# [plot: Yw vs Xw]
Mw = [
    100, 100.583, 101.167, 101.75, 102.333, 102.917, 103.5, 104.083, 104.667, 105.25, 105.833, 106.417;
    550, 538.532, 527.094, 515.698, 504.355, 493.076, 481.872, 470.754, 459.734, 448.821, 438.027, 427.361;
    1, 1, 1, 1, 1, 1, 1, 1, 1, 1, 1, 1
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]
