X1 := [2; 5]
Y1 := [12; 9]  # - AB
X2 := [2; 5]
Y2 := [3; 6]  # - CD
Yo1 := [Y1[0]; Y2[0]]
Xo1 := [X1[0]; X2[0]]
Yo2 := [Y1[1]; Y2[1]]
Xo2 := [X1[1]; X2[1]]
# [plot: Y1, Y2, Yo1, Yo2 vs X1, X2, Xo1, Xo2]
solve block
    # constraints
    x + y == 14
    x - y == -1
    # - уравнение прямой АВ
    # - уравнение прямой CD
    Find(x, y) → [13/2; 15/2]
end solve block
# Найдем точку пересечения
Px := 13/2
Py := 15/2
# Найдем новые координаты точек A,B,C,D после поворота на угол 180^о
P := [X1[0], X1[1], X2[0], X2[1]; Y1[0], Y1[1], Y2[0], Y2[1]; 1, 1, 1, 1]  # - матрица координат
Ts(dx, dy) := [1, 0, -dx; 0, 1, -dy; 0, 0, 1]  # - смещение начала системы координат
Rs(ϕ) := [cos(ϕ), sin(ϕ), 0; -sin(ϕ), cos(ϕ), 0; 0, 0, 1]  # - поворот системы координат на угол ϕ
ϕ := 90
ϕ_rad := ϕ*π/180  # - угол в радианах
# Сместим систему координат в точку Р
A := Ts(Px, Py)*P = [-4.5, -1.5, -4.5, -1.5; 4.5, 1.5, -4.5, -1.5; 1, 1, 1, 1]
# Повернем систему координат на 180 градусов
B := Rs(ϕ_rad)*A = [4.5, 1.5, -4.5, -1.5; 4.5, 1.5, 4.5, 1.5; 1, 1, 1, 1]
# Снова сместим систему координат в исходное положение
C := Ts(-Px, -Py)*B = [11, 8, 2, 5; 12, 9, 12, 9; 1, 1, 1, 1]
X3 := [C[0, 0]; C[0, 1]]
Y3 := [C[1, 0]; C[1, 1]]
X4 := [C[0, 2]; C[0, 3]]
Y4 := [C[1, 2]; C[1, 3]]
Yo3 := [Y3[0]; Y4[0]]
Xo3 := [X3[0]; X4[0]]
Yo4 := [Y3[1]; Y4[1]]
Xo4 := [X3[1]; X4[1]]
# [plot: Y1, Y2, Yo1, Yo2, Y3, Y4, Yo3, Yo4, Py vs X1, X2, Xo1, Xo2, X3, X4, Xo3, Xo4, Px]
